# OpenSim document version 40000
Model 3DGaitModel2354:
  JointSet:
    CustomJoint hip_r:
      Coordinate hip_flexion_r: default_value=0 range=(-2.094395 2.094395) clamped=false
    CustomJoint knee_r:
      Coordinate knee_angle_r: default_value=0 range=(-2.094395 0.1745329) clamped=false
    CustomJoint hip_l:
      Coordinate hip_flexion_l: default_value=0 range=(-2.094395 2.094395) clamped=false
    CustomJoint knee_l:
      Coordinate knee_angle_l: default_value=0 range=(-2.094395 0.1745329) clamped=false
